ORIGIN := 1
Typ := READPRN("Vse-tipovie n5 08-1 (1955-2016) 928ст.txt")
# типовые фазы
# Расчет спектров для типовых фаз
Gr := READPRN("Groupi-nomera.txt")  # error: Не удается открыть файл данных.
i := 1 .. cols(Typ) - 5
r := 1 .. rows(Typ) + 1
H1 := Typ
Typ =  # no stored result
Gr =  # error: Эта переменная не определена.
Co := Typ
Go := cols(Co)
Peregrup(A, B) :=
    i ← 0
    for a ∈ 1 .. cols(A)
        c ← A[1, a]
        for r ∈ 1 .. rows(B)
            D[r, a] ← B[r, c]
            D
    D  # disabled
Go = 16
St := rows(Co)
St/12 = 62
ss := 1 .. St
St = 744
k := 0 .. cols(Co) - 1
J[ss] := ss
nc := Go
nc = 16
k := 1 .. nc
A := [7, 14, 3, 1, 12, 9, 2, 6, 4, 8, 15, 17, 10, 16, 13, 5, 18, 11, 19]  # disabled
Spline[:, k] := lspline(J, Co[:, k])
V := Peregrup(A, Typ)  # error: Эта переменная не определена.
Nx := 2^11
Nx = 2048
Kshatie := rows(Co)/Nx
V =  # error
i := 1 .. Nx
I[i] := i
I1[i] := rows(Co)/Nx*i
V := Typ
Msp1[:, k] := interp(Spline[:, k], J, Co[:, k], I1)
WRITEPRN("TipovieSortPoShirote.txt") := V
F[:, k] := cfft(Msp1[:, k])
Mod(F) :=
    for c ∈ 1 .. cols(F)
        for r ∈ 1 .. rows(F)
            M[r, c] ← sqrt(Re(F[r, c])^2 + Im(F[r, c])^2)
            M
        M
    M
Msp2 := Mod(F)
Msp[:, k] := Msp2[:, k]/max(Msp2[:, k])
h := max(Msp)
l := min(Msp)
y0 := 1
y := 100
# Типовые | Спектр | широта
широта
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# 1 | ?????? 63,28
# 1 | Широта
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# 2 | Широта 61,16 | 2
# ?????? 61,16
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3
# Широта 59,67
3
# ?????? 59,67
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# 4 | Широта 56,16 | 4 | ?????? 56,16
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# 5 | Широта 55,15 | 5 | ?????? 55,15
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# 6 | Широта 53,82
# 6 | ?????? 53,82
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# 7 | Широта 49,44 | 7
# ?????? 49,44
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# 8 | 8
# Широта 49,34 | ?????? 49,34
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# 9 | 9
# Широта 46,34 | ?????? 46,34
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# 10 | Широта 45,56
# 10 | ?????? 45,56
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# 11 | Широта 45,05
# 11 | ?????? 45,05
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# 12 | Широта 39,23
# 12 | ?????? 39,23
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# 13 | Широта 38,85
# 13 | ?????? 38,85
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# 14 | Широта 38,39 | 14 | ?????? 38,39
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# 15 | 15
# Широта 34,41 | ?????? 34,41
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# 16 | 16
# Широта 33,99 | ?????? 33,99
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# 17 | ?????? 32,79
# 17 | Широта 32,79
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18
# 18 | ?????? 19,38
# ?????? 19,38
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# 19 | ?????? 16,65 | 19 | ?????? 16,65
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# 20 | ?????? 14,64 | 20
# ?????? 14,64
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21
# ?????? 12,61 | 21
# ?????? 12,61
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22
# ?????? 11,71
22
# ?????? 11,71
i := 1 .. cols(Typ) - 5
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x := 1 .. rows(Typ)
cols(V) =  # no stored result
k := 1 .. cols(V)
l := 1 .. cols(V)
CS[k, l] := corr(V[:, k], V[:, l])
WRITEPRN("CorrTipovih.txt") := CS
CS =  # no stored result
WRITEPRN("CorrOgibLog-Sred.txt") := CS
